# OpenSim document version 30000
Model Version8_15/11/2012:
  credits: Tom Lintern
  length_units: m
  force_units: N
  gravity: 0 -9.80665 0
  BodySet bodies:
    Body ground: mass=0 mass_center=(0 0 0) inertia_xx=0 inertia_yy=0 inertia_zz=0
    Body torso: mass=4.5 mass_center=(0 0 -0.06) inertia_xx=0.00057064 inertia_yy=0.00059777 inertia_zz=0.00070561
        inertia_xy=9.03e-6 inertia_xz=-8.26e-6 inertia_yz=1.398e-5 meshes=torso_edit_dec.obj
      WeldJoint: parent_body=t2 location_in_parent=(-0.03772377 0.02086513 -0.00218583) location=(0 0 0)
    Body spine_markers: mass=0.1 mass_center=(0 0 0) inertia_xx=0 inertia_yy=0 inertia_zz=0 meshes=spine_bracket.stl
      WeldJoint: parent_body=torso location_in_parent=(0.067 0.034 0.005) orientation_in_parent=(5.4749 1.5574 3.95)
          location=(0 0 0)
    Body t2: mass=0.018 mass_center=(0 0 0) inertia_xx=0.00057064 inertia_yy=0.00057064 inertia_zz=0.00057064
        inertia_xy=9.03e-6 inertia_xz=9.03e-6 inertia_yz=9.03e-6 meshes=t2_edit_dec.obj
      CustomJoint t2ToTorso: parent_body=ground location_in_parent=(0 0 0) location=(0 0 0)
        Coordinate t2ToGND_FE: motion_type=rotational default_value=-1.571424 range=(-5 5) clamped=false
            prescribed=true prescribed_function=Constant(value=-1.571424)
        Coordinate t2ToGND_LB: motion_type=rotational default_value=-1.583492 range=(-5 5) clamped=false
            prescribed=true prescribed_function=Constant(value=-1.583492)
        Coordinate t2ToGND_AR: motion_type=rotational default_value=0.003662882 range=(-5 5) clamped=false
            prescribed=true prescribed_function=Constant(value=0.003662882)
        Coordinate t2ToGND_x: motion_type=translational default_value=-0.1496056 range=(-5 5) clamped=false
            prescribed=true prescribed_function=Constant(value=-0.1496056)
        Coordinate t2ToGND_y: motion_type=translational default_value=0.004119878 range=(-5 5) clamped=false
            prescribed=true prescribed_function=Constant(value=0.004119878)
        Coordinate t2ToGND_z: motion_type=translational default_value=-0.01264954 range=(-5 5) clamped=false
            prescribed=true prescribed_function=Constant(value=-0.01264954)
        SpatialTransform:
          TransformAxis rotation1: coordinates=t2ToGND_FE axis=(0 0 1) LinearFunction(coefficients=1 0)
          TransformAxis rotation2: coordinates=t2ToGND_LB axis=(1 0 0) LinearFunction(coefficients=1 0)
          TransformAxis rotation3: coordinates=t2ToGND_AR axis=(0 1 0) LinearFunction(coefficients=1 0)
          TransformAxis translation1: coordinates=t2ToGND_x axis=(1 0 0) LinearFunction(coefficients=1 0)
          TransformAxis translation2: coordinates=t2ToGND_y axis=(0 1 0) LinearFunction(coefficients=1 0)
          TransformAxis translation3: coordinates=t2ToGND_z axis=(0 0 1) LinearFunction(coefficients=1 0)
    Body sk: mass=0.35 mass_center=(0 0 0) inertia_xx=0.001 inertia_yy=0.001 inertia_zz=0.001 inertia_xy=9.03e-6
        inertia_xz=9.03e-6 inertia_yz=9.03e-6 meshes=sk_edit_dec.obj
      CustomJoint skToc1: parent_body=t2 location_in_parent=(0 -0.15 0) location=(0 0 0)
        Coordinate FE: motion_type=rotational default_value=0 range=(-3.142 3.142) clamped=false
        Coordinate dx: motion_type=translational default_value=0 range=(-0.3 0.3) clamped=false
        Coordinate dy: motion_type=translational default_value=0 range=(-0.3 0.3) clamped=false
        SpatialTransform: axes_held_at_zero=(rotation2 rotation3 translation3)
          TransformAxis rotation1: coordinates=FE axis=(0 0 1) LinearFunction(coefficients=1 0)
          TransformAxis translation1: coordinates=dx axis=(1 0 0) LinearFunction(coefficients=1 0)
          TransformAxis translation2: coordinates=dy axis=(0 1 0) LinearFunction(coefficients=1 0)
    Body head_markers: mass=0.1 mass_center=(0 0 0.01) inertia_xx=0.0001 inertia_yy=0.0001 inertia_zz=0.0001
        meshes=bracket-head_3screw.stl
      WeldJoint: parent_body=sk location_in_parent=(-0.015 -0.048 -0.001) orientation_in_parent=(1.564 6.1823 1.6225)
          location=(0 0 0)
  ForceSet forces:
    CoordinateLimitForce FE_LimitForce: coordinate=FE upper_stiffness=0.1174463 [N*m/degree]
        upper_limit=6.005615 [degrees] lower_stiffness=0.1174463 [N*m/degree] lower_limit=-6.005615 [degrees] damping=0
        transition=2 [degrees] compute_dissipation_energy=false
    BushingForce c1sk_bushing: body_1=t2 body_2=sk location_body_1=(0 0 0) orientation_body_1=(0 0 0.3136449)
        location_body_2=(0 0 0) orientation_body_2=(0 0 0) rotational_stiffness=(0.9930925 0.9930925 0.9930925)
        translational_stiffness=(40 10 50) rotational_damping=(10 10 10) translational_damping=(10 10 10)
  MarkerSet markers:
    Marker m4s: spine_markers (0.1162 -0.0264 0.00457) fixed=true
    Marker m3s: spine_markers (0.1162 -0.0614 0.00457) fixed=true
    Marker m2s: spine_markers (-0.1162 -0.0264 0.00457) fixed=true
    Marker m1s: spine_markers (-0.1162 -0.0514 0.00457) fixed=true
    Marker m1h: head_markers (0.0717 0 -0.054772) fixed=true
    Marker m2h: head_markers (-0.0717 0 -0.038524) fixed=true
    Marker m3h: head_markers (0.0717 0 0.005228) fixed=true
    Marker m5h: head_markers (0.03 0 0.026928) fixed=true
    Marker m4h: head_markers (-0.03 0 0.026928) fixed=true
    Marker m6h: head_markers (-0.0717 0 -0.008524) fixed=true
